// #input "ica_config.csv" -f config -t
#exec strings <ica_config.csv | awk 'BEGIN {FS=","} {print "#define",$1 "=" $2}' >ica_config.glm
#include "ica_config.glm"
module ica_analysis;
module powerflow
{
	violation_record "${OUTPUT:-.}/violation_record.csv";
}
