module tape
{
	csv_header_type NAME;
}

object recorder
{
	parent "Reg1";
	file "${OUTPUT:-.}/regulator.csv";
	interval -1;
	property "tap_A,tap_B,tap_C,power_in_A.real,power_in_B.real,power_in_C.real,power_in.real";
}

object recorder
{
	parent "Load634";
	file "${OUTPUT:-.}/load_634.csv";
	interval -1;
	property "constant_power_A,constant_power_B,constant_power_C,constant_current_A,constant_current_B,constant_current_C,constant_impedance_A,constant_impedance_B,constant_impedance_C";
}
